C_d := 0.02
r_F := 0.1
Δt := 0.1
g := 9.81
F := 0  # Car's forward force input (magnitude)
γ := 0  # Car's steering angle input
P_x := 0  # Car's position on X axis
P_y := 0  # Car's position on Y axis
V := 0  # Car's speed (magnitude)
A := 0  # Car's forward accelaration (magnitude)
surf_A := 0.05  # Car's surface area
α := 0  # Car's heading
M := 0.1  # Car's mass
r := 0.1  # Car's wheel radius
rollResCoef := 0.1  # Car's rolling resistance coeficiant
X(n + 1) := A*X(n) + B*u(n)  # error: A name is required here.  # Next state
Y(n + 1) := C*X[1]*n  # error: A name is required here.  # Output
# 5x5 State space | 6x6 State space | With rolling resistance and variable mass
A(α, V) := [
    1, 0, cos(α)*Δt, 0.5*cos(α)*Δt^2, 0;
    0, 1, sin(α)*Δt, 0.5*sin(α)*Δt^2, 0;
    0, 0, 1, Δt, 0;
    0, 0, -0.5*C_d*surf_A*V/M, 0, 0;
    0, 0, 0, 0, 1
]
X(t) := [P_x; P_y; V; A; α]  # error: This value must be a scalar.
A(α, V) := [
    1, 0, cos(α)*Δt, 0.5*cos(α)*Δt^2, 0, 0;
    0, 1, sin(α)*Δt, 0.5*sin(α)*Δt^2, 0, 0;
    0, 0, 1, Δt, 0, 0;
    0, 0, -0.5*C_d*surf_A*V/M, 0, 0, -sign(V)*g*rollResCoef/(r*M);
    0, 0, 0, 0, 1, 0;
    0, 0, 0, 0, 0, 1
]
X(t) := [P_x; P_y; V; A; α; M]  # error: This value must be a scalar.
B(V) := [0, 0, 0, 0, 0; 0, 0, 0, 0, 0; 0, 0, 0, 0, 0; 0, 0, 0, 1, 0; 0, 0, 0, 0, V*Δt]
u(F, γ) := [0; 0; 0; F - sign(V)*g*rollResCoef/(r*M); γ]
B(V) := [
    0, 0, 0, 0, 0, 0;
    0, 0, 0, 0, 0, 0;
    0, 0, 0, 0, 0, 0;
    0, 0, 0, M^-1, 0, 0;
    0, 0, 0, 0, V*Δt, 0;
    0, 0, 0, 0, 0, Δt
]
u(F, γ, ΔM) := [0; 0; 0; F; γ; ΔM]
C := [1, 0, 0, 0, 0; 0, 1, 0, 0, 0]
C := [1, 0, 0, 0, 0, 0; 0, 1, 0, 0, 0, 0]
# 7x7 State space | With dynamic steering with automatic centering
A(α, V) := [
    1, 0, cos(α)*Δt, 0.5*cos(α)*Δt^2, 0, 0, 0;
    0, 1, sin(α)*Δt, 0.5*sin(α)*Δt^2, 0, 0, 0;
    0, 0, 1, Δt, 0, 0, 0;
    0, 0, -0.5*C_d*surf_A/M, 0, 0, 0, -sign(V)*g*rollResCoef/(r*M);
    0, 0, 0, 0, 1, V*Δt, 0;
    0, 0, 0, 0, 0, -0.5, 0;
    0, 0, 0, 0, 0, 0, 1
]
X(t) := [P_x; P_y; V; A; α; γ[-1]; M]  # error: This value must be a scalar.
B(V) := [
    0, 0, 0, 0, 0, 0;
    0, 0, 0, 0, 0, 0;
    0, 0, 0, 0, 0, 0;
    0, 0, 0, M^-1, 0, 0;
    0, 0, 0, 0, 0, 0;
    0, 0, 0, 0, 1, 0;
    0, 0, 0, 0, 0, Δt
]
u(F, γ, ΔM) := [0; 0; 0; F; 0; γ; ΔM]
C := [1, 0, 0, 0, 0, 0, 0; 0, 1, 0, 0, 0, 0, 0]
